<?xml version="1.0" ?>
<Node name="root" dt="0.05" showBoundingTree="0" gravity="0 -9.8 0">
    <RequiredPlugin pluginName='SofaOpenglVisual'/>
    <VisualStyle displayFlags="showVisual" />

    <DefaultAnimationLoop />
    <DefaultVisualManagerLoop />

    <DefaultPipeline verbose="0" />
    <BruteForceBroadPhase/>
    <BVHNarrowPhase/>
    <DefaultContactManager response="PenalityContactForceField" />
    <MinProximityIntersection name="Proximity" alarmDistance="0.8" contactDistance="0.5" />

    <Node name="LiverVolume">
        <EulerImplicitSolver name="cg_odesolver" printLog="false"  rayleighStiffness="0.1" rayleighMass="0.1" />
        <CGLinearSolver iterations="25" name="linear solver" tolerance="1.0e-9" threshold="1.0e-9" />
        <MeshGmshLoader name="loader" filename="./mesh/banana-big.msh" />
        <!-- <MechanicalObject src="@loader" name="Volume" scale3d="1 1 1" rotation="90 66 0" translation="0.07 0.2 0.6"/> -->
        <MechanicalObject src="@loader" name="Volume" scale3d="1 1 1" rotation="90 0 20" translation="-3 0.2 0"/>

		<TetrahedronSetTopologyContainer  name="TetraContainer" position="@Volume.position" src="@loader" tags=" "/>
		<TetrahedronSetTopologyModifier   name="Modifier" />
		<TetrahedronSetGeometryAlgorithms name="GeomAlgo"  template="Vec3d" />

        <MeshMatrixMass massDensity="1.0" topology="@TetraContainer"/>
        <BoxROI template="Vec3d" box="0 0 0 1 1 1" drawBoxes="1" position="@Volume.rest_position" name="FixedROI"/>
        <!-- <FixedConstraint indices="@FixedROI.indices" /> -->
        <!-- <FastTetrahedralCorotationalForceField name="FEM" youngModulus="1300" poissonRatio="0.3" method="large" />		 -->
		<!-- <TetrahedronFEMForceField name="FEM" youngModulus="1300" poissonRatio="0.3" computeGlobalMatrix="false"
        method="large" topology="@TetraContainer"/> -->
        <TetrahedronHyperelasticityFEMForceField name="HyperElasticMaterial" materialName="StVenantKirchhoff" ParameterSet="3448.2 31034.4" />
        <PlaneForceField normal="0 1 0" d="0" stiffness="100000" showPlane="1" showPlaneSize="20"/>

        <Node name="LiverSurface">
            <TriangleSetTopologyContainer  name="TriContainer" fileTopology="" tags=" " />
			<TriangleSetTopologyModifier   name="Modifier" />
			<TriangleSetGeometryAlgorithms name="GeomAlgo"   template="Vec3d" />

            <Tetra2TriangleTopologicalMapping input="@../TetraContainer" output="@TriContainer" />
			<TriangularBendingSprings name="FEM-Bend" stiffness="600" damping="1.0" topology="@TriContainer" />
			<TriangleCollisionModel />

            <Node name="LiverVisu">
                <OglModel name="Visual" color="blue" />
                <IdentityMapping input="@../../Volume" output="@Visual" />
            </Node>
        </Node>
    </Node>
</Node>
